$PROBLEM
;; Demo starting model for AutoPMX AI automation

$INPUT C ID CYCLE DAY TIME NTIME DV AMT RATE DUR CMT DOSE MDV EVID BQL TYPE STUDY SEX WT AGE
$DATA NM_dat_new.csv IGNORE=C
$SUBROUTINES ADVAN3 TRANS4

$PK
D1=DUR
CL = THETA(1) * EXP(ETA(1))
V1 = THETA(2) * EXP(ETA(2))
Q  = THETA(3) * EXP(ETA(3))
V2 = THETA(4) * EXP(ETA(4))
S1 = V1/1000

$ERROR
IPRED = F
W = SQRT(THETA(5)**2*IPRED**2 + THETA(6)**2)
Y = IPRED + W*EPS(1)

$THETA
(0, 0.0122)
(0, 4.36)
(0, 0.0207)
(0, 2)
(0, 0.141)
(0) FIX

$OMEGA
0.222
0.0521
0 FIX
0 FIX

$SIGMA
1 FIX

$EST METHOD=1 INTER MAXEVAL=9999 NOABORT SIG=3 PRINT=10
$COV
$TABLE ID TIME DV MDV PRED IPRED CWRES CIWRES STUDY ONEHEADER NOPRINT NOAPPEND FILE=SDTAB31 FORMAT=s1PE14.7
$TABLE ID CL V1 Q V2 ETA1 ETA2 ETA3 ETA4 NOPRINT NOAPPEND ONEHEADER FILE=PATAB31
